# technical settings

variable mpiio          index  1         # parallel io on or off

# system settings

variable nvtEqSteps     equal  100000    # 200 ps
variable nptEqSteps     equal  100000    # 200 ps

variable temperatureT   equal    298    # K
variable pressureP      equal      1    # atm

# the standard TIP3P water model requires not only hydrogen bonds to be rigid,
# but also the HOH angle. Here we set the ID of this angle.
# Look it up within the data file.
variable angleIdWater   equal     11

# Intialization
units          real
# http://lammps.sandia.gov/doc/units.html
    #mass = grams/mole
    #distance = Angstroms
    #time = femtoseconds
    #energy = Kcal/mole
    #velocity = Angstroms/femtosecond
    #force = Kcal/mole-Angstrom, compared to gmx: kJ mol^-1 nm^-1,
        # conversion F_lmp = F_gmx * 0.1 [nm/Ang] / 4.184 [kJ/kcal] ~ gmx / 41.81
        # 1000 kJ / (mol*nm) ~ 25 kCal/(mol*Ang)
    #torque = Kcal/mole
    #temperature = Kelvin
    #pressure = atmospheres, 1 atm = 1013 hPa ~ 100 kPa
    #dynamic viscosity = Poise
    #charge = multiple of electron charge (1.0 is a proton)
    #dipole = charge*Angstroms
    #electric field = volts/Angstrom
    #density = gram/cm^dim

# neigh 2.0 bin
# The style value selects what algorithm is used to build the list. The bin
# style creates the list by binning which is an operation that scales linearly
# with N/P, the number of atoms per processor where N = total number of atoms
# and P = number of processors. It is almost always faster than the nsq style
# which scales as (N/P)^2. For unsolvated small molecules in a non-periodic
# box, the nsq choice can sometimes be faster. Either style should give the
# same answers.
# Defaults: 2.0 bin for units = real or metal, skin = 2.0 Angstroms

neigh_modify    delay 2 every 1 check yes
# This command sets parameters that affect the building and use of pairwise
# neighbor lists. Depending on what pair interactions and other commands
# are defined, a simulation may require one or more neighbor lists.

# Note on possible error:
# Out of range atoms - cannot compute PPPM
#    One or more atoms are attempting to map their charge to a PPPM grid point
#    that is not owned by a processor. This is likely for one of two reasons,
#    both of them bad. First, it may mean that an atom near the boundary of a
#    processor’s sub-domain has moved more than 1/2 the neighbor skin distance
#    without neighbor lists being rebuilt and atoms being migrated to new
#    processors. This also means you may be missing pairwise interactions that
#    need to be computed. The solution is to change the re-neighboring criteria
#    via the neigh_modify command. The safest settings are “delay 0 every 1
#    check yes”. Second, it may mean that an atom has moved far outside a
#    processor’s sub-domain or even the entire simulation box. This indicates
#    bad physics, e.g. due to highly overlapping atoms, too large a timestep,
#    etc.

atom_style      full
bond_style      harmonic

angle_style     charmm
# Source: http://lammps.sandia.gov/doc/angle_charmm.html
# angle potential E = K * ( theta - theta_0)^2 + K_UB * ( r - r_UB )^2

dihedral_style  charmmfsw
# Source: http://lammps.sandia.gov/doc/dihedral_charmm.html
# dihedral potential E = K * [ 1 + cos( n*phi - d ) ]
#
# (MacKerell) MacKerell, Bashford, Bellott, Dunbrack, Evanseck, Field, Fischer,
#             Gao, Guo, Ha, et al, J Phys Chem B, 102, 3586 (1998).

improper_style  harmonic
pair_style      lj/charmmfsw/coul/long 8 12
# Quote from http://lammps.sandia.gov/doc/pair_charmm.html
# The newer styles with charmmfsw or charmmfsh in their name replace the
# energy switching with force switching (fsw) and force shifting (fsh)
# functions, for LJ and Coulombic interactions respectively. These follow the
# formulas and description given in (Steinbach) and (Brooks) to minimize these
# artifacts.
#
# (Steinbach) Steinbach, Brooks, J Comput Chem, 15, 667 (1994).
# (Brooks)    Brooks, et al, J Comput Chem, 30, 1545 (2009).

# #
# Storm, S., Jakobtorweihen, S., Smirnova, I., Panagiotopoulos, A.Z., 2013.
# Molecular dynamics simulation of SDS and CTAB micellization and prediction
# of partition equilibria with COSMOmic. Langmuir 29, 11582-11592.
#
# recommend an 8 Ang inner cutoff:
#
# "Recently, Piggot el al. compared different force fields for lipids. Although
# "their recommendations for CHARMM36 force field (CHARMM TIP3P water model,
# "0.8 nm Lennard-Jones switching) are based on bilayer simulations, they were
# "followed here
#
# #
# http://www.gromacs.org/Documentation/Terminology/Force_Fields/CHARMM
#
# notes
#
# Please also note that the switching distance is a matter of some debate in
# lipid bilayer simulations, and it is dependent to some extent on the nature
# of the lipid. Some studies have found that an 0.8-1.0 nm switch is
# appropriate, others argue 0.8-1.2 nm is best, and yet others stand by
# 1.0-1.2 nm. The user is cautioned to thoroughly investigate the force field
# literature for their chosen lipid(s) before beginning a simulation!
#

pair_modify     mix arithmetic
# kspace_style    pppm 1e-6
kspace_style    pppm 1e-4
# Quote from http://lammps.sandia.gov/doc/kspace_style.html:
# pppm value = accuracy
#  accuracy = desired relative error in forces
#
# The pppm style invokes a particle-particle particle-mesh solver (Hockney)
# which maps atom charge to a 3d mesh, uses 3d FFTs to solve Poisson’s
# equation on the mesh, then interpolates electric fields on the mesh points
# back to the atoms. It is closely related to the particle-mesh Ewald
# technique (PME) (Darden) used in AMBER and CHARMM. The cost of traditional
# Ewald summation scales as N^(3/2) where N is the number of atoms in the
# system. The PPPM solver scales as Nlog(N) due to the FFTs, so it is almost
# always a faster choice (Pollock).
#
# [...]
#
# The specified accuracy determines the relative RMS error in per-atom forces
# calculated by the long-range solver. It is set as a dimensionless number,
# relative to the force that two unit point charges (e.g. 2 monovalent ions)
# exert on each other at a distance of 1 Angstrom. This reference value was
# chosen as representative of the magnitude of electrostatic forces in atomic
#  systems. Thus an accuracy value of 1.0e-4 means that the RMS error will be
#  a factor of 10000 smaller than the reference force.
#
# The accuracy setting is used in conjunction with the pairwise cutoff to
# determine the number of K-space vectors for style ewald or the grid size for
#  style pppm or msm.
#
# (Hockney)   Hockney and Eastwood, Computer Simulation Using Particles,
#             Adam Hilger, NY (1989).
# (Darden)    Darden, York, Pedersen, J Chem Phys, 98, 10089 (1993).
# (Pollock)   Pollock and Glosli, Comp Phys Comm, 95, 93 (1996).

read_data       ${dataFile}

special_bonds   charmm
# http://lammps.sandia.gov/doc/special_bonds.html
# The charmm keyword sets the 3 coefficients to 0.0, 0.0, 0.0 for both LJ and
# Coulombic interactions, which is the default for a commonly used version of
# the CHARMM force field. Note that in pair styles lj/charmm/coul/charmm and
# lj/charmm/coul/long the 1-4 coefficients are defined explicitly, and these
# pairwise contributions are computed as part of the charmm dihedral style
# - see the pair_coeff and dihedral_style commands for more information.
# See (MacKerell) for a description of the CHARMM force field.

timestep       2.0 # 0.002 ps = 2 fs

group          water      type  8 9    #  8 - H, 10 - O
group          surface    type  11     # 11 - Au
group          ion        type  10     # 10 - Na+
group          surfactant subtract all water surface ion
group          nonwater   subtract all water

# SDS - specific
#       1      1.008  # HAL2
#       2      1.008  # HAL3
#       3     12.011  # CTL2
#       4     12.011  # CTL3
#       5    15.9994  # OSL
#       6    15.9994  # O2L
#       7      32.06  # SL
#       8      1.008  # HT
#       9    15.9994  # OT
#      10   22.98977  # SOD
#      11   196.9665  # AU

# CTAB - specific
#
# group          water      type  8 9    #  8 - H, 10 - O
# group          surface    type  11     # 11 - Au
# group          ion        type  10     # 10 - Br-
# group          surfactant subtract all water surface ion
# group          nonwater   subtract all water
#
# From "41_CTAB_on_AU_111_21x12x2_bilayer_psfgen.data"
#        1      1.008  # HL
#        2      1.008  # HAL2
#        3      1.008  # HAL3
#        4     12.011  # CTL2
#        5     12.011  # CTL3
#        6     12.011  # CTL5
#        7     14.007  # NTL
#        8      1.008  # HT
#        9    15.9994  # OT
#       10     79.904  # BR
#       11   196.9665  # AU

# fix thermoAveOut all ave/time 1 100 100 c_thermo_etotal c_thermo_ke c_thermo_pe &
#   c_thermo_temp c_thermo_press c_thermo_enthalpy c_thermo_ebond c_thermo_eangle &
#   c_thermo_edihed c_thermo_eimp c_thermo_epair c_thermo_evdwl c_thermo_ecoul  &
#   c_thermo_elong c_thermo_etail c_thermo_vol &
#   mode scalar file ${baseName}_thermo.out
thermo_style   custom step etotal ke pe temp press enthalpy ebond eangle &
  edihed eimp epair evdwl ecoul elong etail vol
# log output every 2 ps
thermo         1000
thermo_modify  norm no
# Note that some computes calculate “intensive” global quantities like
# temperature; others calculate “extensive” global quantities like kinetic
# energy that are summed over all atoms in the compute group. Intensive
# quantities are printed directly without normalization by thermo_style custom.
# Extensive quantities may be normalized by the total number of atoms in the
# simulation (NOT the number of atoms in the compute group) when output,
# depending on the thermo_modify norm option being used.
